A_0 := 1
t_min := 1*10^-3
f_0 := 1*10^3
t_max := 4*10^-3
ω_0 := 2*π*f_0 = 6283.19
s_v(t) :=
    1 if t_min ≤ t ≤ t_max
    0 otherwise
f_1 := 100
φ_0 := π
m_0 := 0.5
Ω_0 := 2*π*f_1
Φ_0 := 0
s_0(t) := A_0*sin(ω_0*t + φ_0)
s_r(t) := s_0(t)*s_v(t)
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s_AM(t) := A_0*(m_0*sin(Ω_0*t + Φ_0) + 1)*sin(ω_0*t + φ_0)
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m_0 := 3
Φ_1(t) := m_0*sin(Ω_0*t + Φ_0)
s_PM(t) := sin(ω_0*t + Φ_1(t))
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