ω_0 := 10
s(t) :=
    temp ← t
    while not (-π < temp ≤ π)
        temp ← temp - 2*π if temp > π
        temp ← temp + 2*π if temp < -π
    0 if -π < temp < 0
    cos(ω_0*t) if 0 ≤ temp ≤ π
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N := 20
k := 0 .. N
a[k] := 1/π*integral(s(t)*cos(k*t), t = -π .. π)
b[k] := 1/π*integral(s(t)*sin(k*t), t = -π .. π)
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s_new(t) := sum(a[k]*cos(k*t) + b[k]*sin(k*t), k = 0 .. N)
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s_first(t) :=
    temp ← t
    while not (-π < temp ≤ π)
        temp ← temp - 2*π if temp > π
        temp ← temp + 2*π if temp < -π
    temp if -π < temp ≤ π
s_second(t) :=
    temp ← t
    while not (-π < temp ≤ π)
        temp ← temp - 2*π if temp > π
        temp ← temp + 2*π if temp < -π
    |temp| if -π < temp ≤ π
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