τ_i := 1
T := 3
s(t) := Φ(t + τ_i/2) - Φ(t - τ_i/2)
B_s(τ) := integral(s(t)*s(t - τ), t = -∞ .. ∞)
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B_s'(τ) :=
    t_max ← 2*τ_i
    N_count ← 500
    temp ← 0
    for i ∈ -N_count .. N_count
        temp ← temp + s(t_max/(2*N_count)*i)*s(t_max/(2*N_count)*i - τ)/N_count
    temp
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s_k(t) := Φ(t) - Φ(t - τ_i) + Φ(t - T) - Φ(t - τ_i - T) + Φ(t - 2*T) - Φ(t - τ_i - 2*T)
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τ_ik := 7
N := 3
B_sk'(τ) :=
    t_max ← 2*τ_ik
    N_count ← 500
    temp ← 0
    for i ∈ -N_count .. N_count
        temp ← temp + s_k(t_max/N_count*i)*s_k(t_max/N_count*i - τ)/(N_count/(N*T/τ_ik))
    temp
τ_y := 1
a_y := 2/τ_y = 2
T_py := 1
α := 10
τ_e := -2
s_kv(t) := Φ(t) - Φ(t - τ_i) + Φ(t - T) - Φ(t - 2*τ_i - T)
s_e(t) := exp(-α*t^2)
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s_str(t) :=
    temp ← t
    a_y*(temp + T_py/2) if -T_py/2 < temp ≤ -(T_py - τ_y)/2
    1 + a_y*(-(T_py - τ_y)/2 - temp) if -(T_py - τ_y)/2 < temp ≤ τ_y - T_py/2
    0 otherwise
B_se'(τ) :=
    t_max ← 2*τ_e
    N_count ← 500
    temp ← 0
    for i ∈ -N_count .. N_count
        temp ← temp + s_e(t_max/(2*N_count)*i)*s_e(t_max/(2*N_count)*i - τ)/N_count
    temp
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τ_ikv := 7
B_vkf'(τ) :=
    t_max ← 2*τ_ikv
    N_count ← 500
    temp ← 0
    for i ∈ -N_count .. N_count
        temp ← temp + s(t_max/N_count*i)*s_kv(t_max/N_count*i - τ)/N_count
    temp
B_str'(τ) :=
    t_max ← 2*τ_y
    N_count ← 500
    temp ← 0
    for i ∈ -N_count .. N_count
        temp ← temp + s_str(t_max/(2*N_count)*i)*s_str(t_max/(2*N_count)*i - τ)/N_count
    temp
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