τ_i := 1
N_k := 30  # количесто отсчётов
ω_v := 2*π*15/τ_i  # количество липестков
s(t) := Φ(t + τ_i/2) - Φ(t - τ_i/2)
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s'(t) := sum(s(k*π/ω_v)*sin(ω_v*(t - k*π/ω_v))/(ω_v*(t - k*π/ω_v)), k = -N_k/2 .. N_k/2)
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