A_0 := 1
τ_i := 1
N_k := 1500  # количесто отсчётов
ω_0 := 10*2*π/τ_i
ω_v := 15*π*15/τ_i  # количество липестков  # (верхняя граничная частота)
s(t) := cos(ω_0*t)*(Φ(t + τ_i/2) - Φ(t - τ_i/2))
φ_0 := π
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s_0(t) := A_0*sin(ω_0*t + φ_0)
f_1 := 15*2*π/τ_i
m_0 := 0.5
Ω_0 := 2*π*f_1
Φ_0 := 0
s_AM(t) := A_0*(m_0*sin(ω_0*t + φ_0) + 1)*sin(Ω_0*t + Φ_0)
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s'(t) := sum(s(k*π/ω_v)*sin(ω_v*(t - k*π/ω_v))/(ω_v*(t - k*π/ω_v)), k = -N_k/2 .. N_k/2)
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s''(t) := sum(s_AM(k*π/ω_v)*sin(ω_v*(t - k*π/ω_v))/(ω_v*(t - k*π/ω_v)), k = -N_k/2 .. N_k/2)
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