Data := READPRN("circuit1.DNO")
Given
k := 1
a := 1
b := 1
Data[5, 1] == a*Data[5, 0]^2 + k*Data[5, 0] + b
Data[3, 1] == a*Data[3, 0]^2 + k*Data[3, 0] + b
Data = [
    0, 0;
    0.299999, 1e-7;
    0.596486, 0.0003514;
    0.75212, 0.0147931;
    0.810093, 0.0389915;
    0.852303, 0.0647699;
    0.888879, 0.0911122;
    0.922584, 0.117742;
    0.954555, 0.144544;
    0.985366, 0.171463;
    1.01535, 0.198465
]
Data[2, 1] == a*Data[2, 0]^2 + k*Data[2, 0] + b
Matr := Find(a, k, b) = [1.58731; -2.04786; 0.657115]
φ := π
U_0(t) := 0.3*sin(2*π*t + φ) + 0.7
I(U) :=
    (Matr[0]*U^2 + Matr[1]*U + Matr[2]) if U > 0.6
    0 otherwise
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DataTrans := READPRN("circuit2.TNO")
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